// SBML level 2 version 4

model TwoStepSynthesisWithGlu()

  // Compartments:
  compartment medium = 1;

  // Species:
  species Bac in medium = init_Bac;
  species Glu in medium = 10;
  species cGlu in medium = 0;
  species Ind in medium = 0;

  // Parameters:
  Bacmax_typeIDT5_ExpID4 = 0.8217706;
  beta_typeIDT5_ExpID4 = 0.004097738;
  init_Bac = 0.01381583;
  kdegi_typeIDT5 = 3.845033;
  kdim_typeIDT5 = 18.21578;
  ksyn_typeIDT5 = 0.09578724;
  sd_Bacnorm = 0.03782271;
  sd_IndconcNormRange = 0.02061447;
  tau_typeIDT5_ExpID4 = 0.009498406;

  // Assignment rules:
  lag := piecewise(0, time - tau_typeIDT5_ExpID4 < 0, 1);
  Bacnorm := Bac;
  IndconcNormRange := Ind;

  // Reactions:
  reaction1: => Bac; medium*(-(Bac*beta_typeIDT5_ExpID4*lag*(Bac - Bacmax_typeIDT5_ExpID4))/Bacmax_typeIDT5_ExpID4);
  reaction2: => Glu; medium*(-Bac)*Glu*ksyn_typeIDT5;  // modifiers: Bac
  reaction3: => cGlu; medium*(Bac*Glu*ksyn_typeIDT5 - cGlu^2*kdim_typeIDT5);  // modifiers: Bac, Glu
  reaction4: => Ind; medium*(cGlu^2*kdim_typeIDT5 - Ind*kdegi_typeIDT5);  // modifiers: cGlu

  // Unit definitions:
  unit time = 60 second;
end
