// SBML level 2 version 4

model model_Mif()

  // Compartments:
  compartment cyt = 1;

  // Species:
  species IR in cyt = 9.949576;
  species IRins in cyt = 0.01739722;
  species IRp in cyt = 1.762901e-9;
  species IRiP in cyt = 1.1159e-5;
  species IRi in cyt = 0.03301519;
  species IRS in cyt = 9.866993;
  species IRSiP in cyt = 0.1330065;
  species XX in cyt = 9.999842;
  species XXp in cyt = 0.0001580051;

  // Parameters:
  k1a = 0.1772523;
  k1aBasic = 0.0003941057;
  k1b = 0.1745296;
  k1c = 0.05086185;
  k1d = 500000;
  k1e = 1e-6;
  k1f = 500000;
  k1g = 1931.134;
  k1r = 0.02669839;
  k21 = 2.130199;
  k22 = 658.7629;
  k3 = 4.943698e-5;
  k_IRP_1Step = 199999.9;
  k_IRSiP_1Step = 45.18767;
  km2 = 1.161681;
  km3 = 0.416147;
  sigmaY1TimR = 3.89349;
  sigmaY2TimR = 13.60101;

  // Assignment rules:
  insulin := 100*piecewise(0, time < 0, 1);
  IR1_P := k_IRP_1Step*(IRiP + IRp);
  IRS1_P := IRSiP*k_IRSiP_1Step;

  // Reactions:
  v1_v_0: IR => IRins; cyt*(IR*k1aBasic + IR*insulin*k1a);
  v2_v_1: IRins => IR; cyt*IRins*k1b;
  v3_v_2: IRins => IRp; cyt*IRins*k1c;
  v4_v_3: IRp => IRiP; cyt*IRp*k1d;
  v5_v_4: IRiP => IRi; cyt*IRiP*(k1e + XXp*k1f/(XXp + 1));  // modifiers: XXp
  v6_v_5: IRp => IR; cyt*IRp*k1g;
  v7_v_6: IRi => IR; cyt*IRi*k1r;
  v8_v_7: IRS => IRSiP; cyt*IRS*k21*(IRp + IRiP*k22);  // modifiers: IRiP, IRp
  v9_v_8: IRSiP => IRS; cyt*IRSiP*km2;
  v10_v_9: XX => XXp; cyt*IRSiP*XX*k3;  // modifiers: IRSiP
  v11_v_10: XXp => XX; cyt*XXp*km3;

  // Unit definitions:
  unit time = 60 second;
end
