// SBML level 2 version 4

model model_template()

  // Compartments:
  compartment cyt = 1;

  // Species:
  species bcar in cyt = init_bcar2; bcar is "beta-carotin";
  species bcry in cyt = 0;
  species b10 in cyt = 0; b10 is "beta-10";
  species bio in cyt = 0; bio is "beta-io";
  species ohb10 in cyt = 0; ohb10 is "OH-beta-10";
  species ohbio in cyt = 0; ohbio is "OH-beta-io";
  species zea in cyt = 0;

  // Parameters:
  init_bcar2 = 3.256733;
  k5 = 0.003050071;
  kb1 = 0.01641699;
  kb2 = 0.005371462;
  kc1 = 0.001627209;
  kc2 = 0.006730609;
  kc4 = 0.006179669;
  szea = 0.5218171;

  // Assignment rules:
  obcar := bcar;
  obcry := bcry;
  obio := bio;
  ob10 := b10;
  oohb10 := ohb10;
  ozea := zea;

  // Reactions:
  v1_ReactionName: bcar => b10 + bio; cyt*bcar*kb1*szea;
  v2_ReactionName: b10 => bio; cyt*b10*kb2*szea;
  v3_ReactionName: bcry => b10 + ohbio; cyt*bcry*kc1*szea;
  v4_ReactionName: bcry => bio + ohb10; cyt*bcry*kc2*szea;
  v5_ReactionName: ohb10 => ohbio; cyt*kc4*ohb10*szea;
  v6_ReactionName: zea => ohb10 + ohbio; cyt*k5*szea*zea;

  // Unit definitions:
  unit time = 60 second;
end
