// SBML level 2 version 4

model jak2_stat5_h838_l1_final()

  // Compartments:
  compartment cyt = 11.56;
  compartment nuc = 2.15;

  // Species:
  species EpoRJAK2 in cyt = ReltoH838_init_EpoRJAK2_H838*init_EpoRJAK2_H838;
  species EpoRpJAK2 in cyt = 0;
  species pEpoRpJAK2 in cyt = 0;
  species PTP in cyt = Relto_H838WT_init_PTP*init_PTP;
  species PTPAct in cyt = 0;
  species STAT5 in cyt = Relto_CFUE_init_STAT5*init_STAT5;
  species pSTAT5 in cyt = 0;
  species nSTAT5 in nuc = 0;
  species npSTAT5 in nuc = 0;
  species CISHnRNA1 in nuc = CISHRNAeqm*CISHRNAbasal/CISHRNAdelay;
  species CISHnRNA2 in nuc = CISHRNAeqm*CISHRNAbasal/CISHRNAdelay;
  species CISHnRNA3 in nuc = CISHRNAeqm*CISHRNAbasal/CISHRNAdelay;
  species CISHnRNA4 in nuc = CISHRNAeqm*CISHRNAbasal/CISHRNAdelay;
  species CISHnRNA5 in nuc = CISHRNAeqm*CISHRNAbasal/CISHRNAdelay;
  species CISHRNA in cyt = 0.1859862*CISHRNAeqm*CISHRNAbasal/(CISHRNAturn*Relto_CFUE_CISHRNAturn);
  species CIS in cyt = 0.1859862*CISeqm*CISHRNAbasal/(CISHRNAturn*Relto_CFUE_CISHRNAturn);
  species SOCS3nRNA1 in nuc = SOCS3RNAeqm*SOCS3RNAbasal/(Relto_CFUE_SOCS3RNAdelay*SOCS3RNAdelay);
  species SOCS3nRNA2 in nuc = SOCS3RNAeqm*SOCS3RNAbasal/(Relto_CFUE_SOCS3RNAdelay*SOCS3RNAdelay);
  species SOCS3nRNA3 in nuc = SOCS3RNAeqm*SOCS3RNAbasal/(Relto_CFUE_SOCS3RNAdelay*SOCS3RNAdelay);
  species SOCS3nRNA4 in nuc = SOCS3RNAeqm*SOCS3RNAbasal/(Relto_CFUE_SOCS3RNAdelay*SOCS3RNAdelay);
  species SOCS3nRNA5 in nuc = SOCS3RNAeqm*SOCS3RNAbasal/(Relto_CFUE_SOCS3RNAdelay*SOCS3RNAdelay);
  species SOCS3RNA in cyt = 0.1859862*SOCS3RNAeqm*SOCS3RNAbasal/SOCS3RNAturn;
  species SOCS3 in cyt = 0.1859862*SOCS3eqm*SOCS3RNAbasal/SOCS3RNAturn;

  // Parameters:
  CISHRNAbasal = 2.463588e-5;
  CISHRNAdelay = 0.2048346;
  CISHRNAeqm = 1;
  CISHRNAturn = 0.05939186;
  CISeqm = 338.6192;
  CISinh = 1e-5;
  CISturn = 0.01048629;
  EPORactJAK2 = 4.14215;
  JAK2EPORdeactPTP = 14804.8;
  JAK2actEPO = 1449024;
  PTPactEPOR = 1.000004e-5;
  PTPdeact = 0.009040546;
  ReltoH838_init_EpoRJAK2_H838 = 8.58352;
  Relto_CFUE_CISHRNAturn = 0.4192631;
  Relto_CFUE_EPORactJAK2 = 0.08658398;
  Relto_CFUE_JAK2actEPO = 0.06192333;
  Relto_CFUE_SOCS3RNAdelay = 14.3956;
  Relto_CFUE_SOCS3prom = 3.714293;
  Relto_CFUE_STAT5imp = 4.867608;
  Relto_CFUE_init_STAT5 = 0.07233806;
  Relto_CFUE_nSTAT5deact = 12.41249;
  Relto_H838WT_init_PTP = 0.1069562;
  SOCS3RNAbasal = 0.002077005;
  SOCS3RNAdelay = 0.1877794;
  SOCS3RNAeqm = 1;
  SOCS3RNAturn = 0.06118386;
  SOCS3eqm = 95.20704;
  SOCS3inh = 7.810803;
  SOCS3prom = 1;
  SOCS3turn = 10000;
  STAT5actEPOR = 1.774465;
  STAT5actJAK2 = 0.02415719;
  STAT5exp = 0.1000045;
  STAT5imp = 0.03758003;
  init_EpoRJAK2 = 2.583871;
  init_EpoRJAK2_H838 = 0.1772354;
  init_PTP = 26.72512;
  init_STAT5 = 76.19198;
  nSTAT5deact = 0.07896114;
  offset_CISRNA_H838 = 0.3097465;
  offset_SOCS3RNA_H838 = 0.1316851;
  scale_CISRNA_H838 = 250.8858;
  scale_SOCS3RNA_H838 = 1000;
  sd_RNA_H838 = 0.08930241;

  // Assignment rules:
  Epo := 0.00092105;
  step_function := piecewise(0, time - 30 < 0, 1);
  CishRNA_rep1_au := log10(offset_CISRNA_H838 + CISHRNA*scale_CISRNA_H838/(CISHRNAeqm*Relto_CFUE_init_STAT5));
  CishRNA_rep2_au := log10(offset_CISRNA_H838 + CISHRNA*scale_CISRNA_H838/(CISHRNAeqm*Relto_CFUE_init_STAT5));
  CishRNA_rep3_au := log10(offset_CISRNA_H838 + CISHRNA*scale_CISRNA_H838/(CISHRNAeqm*Relto_CFUE_init_STAT5));
  SOCS3RNA_rep1_au := log10(offset_SOCS3RNA_H838 + SOCS3RNA*init_STAT5^SOCS3prom*scale_SOCS3RNA_H838/(SOCS3RNAeqm*(Relto_CFUE_init_STAT5*init_STAT5)^(Relto_CFUE_SOCS3prom*SOCS3prom)));
  SOCS3RNA_rep2_au := log10(offset_SOCS3RNA_H838 + SOCS3RNA*init_STAT5^SOCS3prom*scale_SOCS3RNA_H838/(SOCS3RNAeqm*(Relto_CFUE_init_STAT5*init_STAT5)^(Relto_CFUE_SOCS3prom*SOCS3prom)));
  SOCS3RNA_rep3_au := log10(offset_SOCS3RNA_H838 + SOCS3RNA*init_STAT5^SOCS3prom*scale_SOCS3RNA_H838/(SOCS3RNAeqm*(Relto_CFUE_init_STAT5*init_STAT5)^(Relto_CFUE_SOCS3prom*SOCS3prom)));

  // Reactions:
  v1_v_0: EpoRJAK2 => EpoRpJAK2; cyt*(Epo*EpoRJAK2*JAK2actEPO*Relto_CFUE_JAK2actEPO/(SOCS3*SOCS3inh/SOCS3eqm + 1));  // modifiers: SOCS3
  v2_v_1: EpoRpJAK2 => EpoRJAK2; cyt*(EpoRpJAK2*JAK2EPORdeactPTP*PTPAct/init_PTP);  // modifiers: PTPAct
  v3_v_2: EpoRpJAK2 => pEpoRpJAK2; cyt*(EPORactJAK2*EpoRpJAK2*Relto_CFUE_EPORactJAK2/(SOCS3*SOCS3inh/SOCS3eqm + 1));  // modifiers: SOCS3
  v4_v_3: pEpoRpJAK2 => EpoRJAK2; cyt*(JAK2EPORdeactPTP*PTPAct*pEpoRpJAK2/init_PTP);  // modifiers: PTPAct
  v5_v_4: PTP => PTPAct; cyt*(PTP*PTPactEPOR*(EpoRpJAK2 + pEpoRpJAK2)/init_EpoRJAK2);  // modifiers: EpoRpJAK2, pEpoRpJAK2
  v6_v_5: PTPAct => PTP; cyt*PTPAct*PTPdeact;
  v7_v_6: STAT5 => pSTAT5; cyt*(STAT5*STAT5actJAK2*(EpoRpJAK2 + pEpoRpJAK2)/(init_EpoRJAK2*(SOCS3*SOCS3inh/SOCS3eqm + 1)));  // modifiers: EpoRpJAK2, SOCS3, pEpoRpJAK2
  v8_v_7: STAT5 => pSTAT5; cyt*(STAT5*STAT5actEPOR*pEpoRpJAK2^2/(init_EpoRJAK2^2*(SOCS3*SOCS3inh/SOCS3eqm + 1)*(CIS*CISinh/CISeqm + 1)));  // modifiers: CIS, SOCS3, pEpoRpJAK2
  v9_v_8: pSTAT5 => npSTAT5; cyt*Relto_CFUE_STAT5imp*STAT5imp*pSTAT5;
  v10_v_9: npSTAT5 => nSTAT5; nuc*Relto_CFUE_nSTAT5deact*nSTAT5deact*npSTAT5;
  v11_v_10: nSTAT5 => STAT5; nuc*STAT5exp*nSTAT5;
  v12_v_11: => CISHnRNA1; nuc*CISHRNAeqm*CISHRNAbasal;
  v13_v_12: => CISHnRNA1; nuc*(CISHRNAeqm*CISHRNAturn*Relto_CFUE_CISHRNAturn*npSTAT5/init_STAT5);  // modifiers: npSTAT5
  v14_v_13: CISHnRNA1 => CISHnRNA2; nuc*CISHnRNA1*CISHRNAdelay;
  v15_v_14: CISHnRNA2 => CISHnRNA3; nuc*CISHnRNA2*CISHRNAdelay;
  v16_v_15: CISHnRNA3 => CISHnRNA4; nuc*CISHnRNA3*CISHRNAdelay;
  v17_v_16: CISHnRNA4 => CISHnRNA5; nuc*CISHnRNA4*CISHRNAdelay;
  v18_v_17: CISHnRNA5 => CISHRNA; nuc*CISHnRNA5*CISHRNAdelay;
  v19_v_18: CISHRNA => ; cyt*CISHRNA*CISHRNAturn*Relto_CFUE_CISHRNAturn;
  v20_v_19: => CIS; cyt*(CISHRNA*CISeqm*CISturn/CISHRNAeqm);  // modifiers: CISHRNA
  v21_v_20: CIS => ; cyt*CIS*CISturn;
  v22_v_21: => SOCS3nRNA1; nuc*SOCS3RNAeqm*SOCS3RNAbasal;
  v23_v_22: => SOCS3nRNA1; nuc*(SOCS3RNAeqm*SOCS3RNAturn*npSTAT5^(Relto_CFUE_SOCS3prom*SOCS3prom)/init_STAT5^SOCS3prom);  // modifiers: npSTAT5
  v24_v_23: SOCS3nRNA1 => SOCS3nRNA2; nuc*Relto_CFUE_SOCS3RNAdelay*SOCS3nRNA1*SOCS3RNAdelay;
  v25_v_24: SOCS3nRNA2 => SOCS3nRNA3; nuc*Relto_CFUE_SOCS3RNAdelay*SOCS3nRNA2*SOCS3RNAdelay;
  v26_v_25: SOCS3nRNA3 => SOCS3nRNA4; nuc*Relto_CFUE_SOCS3RNAdelay*SOCS3nRNA3*SOCS3RNAdelay;
  v27_v_26: SOCS3nRNA4 => SOCS3nRNA5; nuc*Relto_CFUE_SOCS3RNAdelay*SOCS3nRNA4*SOCS3RNAdelay;
  v28_v_27: SOCS3nRNA5 => SOCS3RNA; nuc*Relto_CFUE_SOCS3RNAdelay*SOCS3nRNA5*SOCS3RNAdelay;
  v29_v_28: SOCS3RNA => ; cyt*SOCS3RNA*SOCS3RNAturn;
  v30_v_29: => SOCS3; cyt*(SOCS3RNA*SOCS3eqm*SOCS3turn/SOCS3RNAeqm);  // modifiers: SOCS3RNA
  v31_v_30: SOCS3 => ; cyt*SOCS3*SOCS3turn;

  // Unit definitions:
  unit time = 60 second;
end
