// SBML level 2 version 4

model Kreutz_IR_binding()

  // Compartments:
  compartment ExtracellularMedium = 1;

  // Species:
  species Ins in ExtracellularMedium = 10000; Ins is "Insulin";
  species Rec1 in ExtracellularMedium = ini_R1; Rec1 is "Receptors_low";
  species Rec2 in ExtracellularMedium = ini_R1*ini_R2fold; Rec2 is "Receptors_high";
  species IR1 in ExtracellularMedium = 0; IR1 is "IR_low";
  species IR2 in ExtracellularMedium = 0; IR2 is "IR_high";
  species IR1in in ExtracellularMedium = 0; IR1in is "IR_low_internalized";
  species IR2in in ExtracellularMedium = 0; IR2in is "IR_high_internalized";
  species Uptake1 in ExtracellularMedium = 0;
  species Uptake2 in ExtracellularMedium = 0;
  species InsulinFragments in ExtracellularMedium = 0;
  species BoundUnspec in ExtracellularMedium = 0;

  // Parameters:
  fragments = 0.9999799;
  ini_R1 = 47.23702;
  ini_R2fold = 16.45763;
  ka1 = 0.009379804;
  ka2fold = 2.090769;
  kd1 = 6.722692;
  kd2fold = 9.618501;
  kin = 3.756549;
  kin2 = 0.545304;
  km_nExpID1 = 9.999995e7;
  koff_unspec = 9.645788;
  kon_unspec = 19.94143;
  kout = 324.7258;
  kout2 = 0.05290796;
  kout_frag = 0.01004217;
  offset_nExpID1 = 0.02501856;
  scaleElisa_nExpID1 = 0.5399361;
  std = 0.2601544;

  // Assignment rules:
  Insulin_obs := log10(offset_nExpID1 + scaleElisa_nExpID1*(Ins + InsulinFragments*fragments)/((Ins + InsulinFragments*fragments)/km_nExpID1 + 1));

  // Reactions:
  v1_ka1: Ins + Rec1 => IR1; ExtracellularMedium*Ins*Rec1*ka1;
  v2_ka2fold: Ins + Rec2 => IR2; ExtracellularMedium*Ins*Rec2*ka1*ka2fold;
  v3_v_2: Ins => BoundUnspec; ExtracellularMedium*Ins*kon_unspec;
  v4_v_3: BoundUnspec => Ins; ExtracellularMedium*BoundUnspec*koff_unspec;
  v5_kd1: IR1 => Ins + Rec1; ExtracellularMedium*IR1*kd1;
  v6_kd2fold: IR2 => Ins + Rec2; ExtracellularMedium*IR2*kd1*kd2fold;
  v7_v_6: IR1 => IR1in; ExtracellularMedium*IR1*kin;
  v8_v_7: IR2 => IR2in; ExtracellularMedium*IR2*kin2;
  v9_v_8: IR1in => IR1; ExtracellularMedium*IR1in*kout;
  v10_v_9: IR2in => IR2; ExtracellularMedium*IR2in*kout2;
  v11_v_10: IR1in => Rec1 + InsulinFragments; ExtracellularMedium*IR1in*kout_frag;
  v12_v_11: IR2in => Rec2 + InsulinFragments; ExtracellularMedium*IR2in*kout_frag;
  v13_v_12: => Uptake1; ExtracellularMedium*(Ins*Rec1*ka1 - IR1*kd1);  // modifiers: IR1, Ins, Rec1
  v14_v_13: => Uptake2; ExtracellularMedium*(Ins*Rec2*ka1*ka2fold - IR2*kd1*kd2fold);  // modifiers: IR2, Ins, Rec2

  // Unit definitions:
  unit time = 60 second;
end
