// SBML level 2 version 4

model epo_int_rep()

  // Compartments:
  compartment default = 1;

  // Species:
  species Epo in default = init_Epo;
  species EpoR in default = 4*init_Epo*init_EpoR_rel;
  species Epo_EpoR in default = 0;
  species Epo_EpoR_i in default = 0;
  species dEpo_i in default = 0;
  species dEpo_e in default = 0;

  // Parameters:
  init_Epo = 1347.49;
  init_EpoR_rel = 0.09205155;
  kde = 0.01198817;
  kdi = 0.001272664;
  ke = 0.05546006;
  kex = 0.0005780045;
  koff = 0.08068608;
  kon = 0.1513435;
  kt = 0.01601252;
  offset = 1e-5;
  scale = 0.9798296;
  sd_Epo_ext = 0.008422494;
  sd_Epo_int = 0.05535;
  sd_Epo_mem = 0.04782697;

  // Assignment rules:
  Epo_ext_cpm := log10(offset + scale*(Epo + dEpo_e)/init_Epo);
  Epo_mem_cpm := log10(offset + Epo_EpoR*scale/init_Epo);
  Epo_int_cpm := log10(offset + scale*(Epo_EpoR_i + dEpo_i)/init_Epo);

  // Reactions:
  v1_v_0: Epo + EpoR => Epo_EpoR; Epo*EpoR*kon/init_Epo;
  v2_v_1: Epo_EpoR => Epo + EpoR; Epo_EpoR*koff;
  v3_v_2: => EpoR; 4*init_Epo*init_EpoR_rel*kt;
  v4_v_3: EpoR => ; EpoR*kt;
  v5_v_4: Epo_EpoR => Epo_EpoR_i; Epo_EpoR*ke;
  v6_v_5: Epo_EpoR_i => Epo + EpoR; Epo_EpoR_i*kex;
  v7_v_6: Epo_EpoR_i => dEpo_i; Epo_EpoR_i*kdi;
  v8_v_7: Epo_EpoR_i => dEpo_e; Epo_EpoR_i*kde;

  // Unit definitions:
  unit time = 60 second;
end
