// SBML level 2 version 4

model TwoStepSynthesisWithGlu()

  // Compartments:
  compartment medium = 1;

  // Species:
  species Bac in medium = init_Bac;
  species Glu in medium = 10;
  species cGlu in medium = 0;
  species Ind in medium = 0;

  // Parameters:
  Bacmax_typeIDT3_ExpID5 = 0.9555944;
  beta_typeIDT3_ExpID5 = 0.002047364;
  init_Bac = 0.01470079;
  kdegi_typeIDT3 = 0.003894538;
  kdim_typeIDT3 = 0.002093512;
  ksyn_typeIDT3 = 0.0008380952;
  sd_Bacnorm = 0.03705789;
  sd_IndconcNormRange = 0.0203937;
  tau_typeIDT3_ExpID5 = 0.0009070045;

  // Assignment rules:
  lag := piecewise(0, time - tau_typeIDT3_ExpID5 < 0, 1);
  Bacnorm := Bac;
  IndconcNormRange := Ind;

  // Reactions:
  reaction1: => Bac; medium*(-(Bac*beta_typeIDT3_ExpID5*lag*(Bac - Bacmax_typeIDT3_ExpID5))/Bacmax_typeIDT3_ExpID5);
  reaction2: => Glu; medium*(-Bac)*Glu*ksyn_typeIDT3;  // modifiers: Bac
  reaction3: => cGlu; medium*(Bac*Glu*ksyn_typeIDT3 - cGlu^2*kdim_typeIDT3);  // modifiers: Bac, Glu
  reaction4: => Ind; medium*(cGlu^2*kdim_typeIDT3 - Ind*kdegi_typeIDT3);  // modifiers: cGlu

  // Unit definitions:
  unit time = 60 second;
end
