// SBML level 2 version 4

model TwoStepSynthesisWithGlu()

  // Compartments:
  compartment medium = 1;

  // Species:
  species Bac in medium = init_Bac;
  species Glu in medium = 10;
  species cGlu in medium = 0;
  species Ind in medium = 0;

  // Parameters:
  Bacmax_typeIDwt_ExpID4 = 0.6246795;
  beta_typeIDwt_ExpID4 = 0.007006855;
  init_Bac = 0.01470079;
  kdegi_typeIDwt = 0.01029326;
  kdim_typeIDwt = 6.855103e-5;
  ksyn_typeIDwt = 0.005533086;
  sd_Bacnorm = 0.03705789;
  sd_IndconcNormRange = 0.0203937;
  tau_typeIDwt_ExpID4 = 1126.307;

  // Assignment rules:
  lag := piecewise(0, time - tau_typeIDwt_ExpID4 < 0, 1);
  Bacnorm := Bac;
  IndconcNormRange := Ind;

  // Reactions:
  reaction1: => Bac; medium*(-(Bac*beta_typeIDwt_ExpID4*lag*(Bac - Bacmax_typeIDwt_ExpID4))/Bacmax_typeIDwt_ExpID4);
  reaction2: => Glu; medium*(-Bac)*Glu*ksyn_typeIDwt;  // modifiers: Bac
  reaction3: => cGlu; medium*(Bac*Glu*ksyn_typeIDwt - cGlu^2*kdim_typeIDwt);  // modifiers: Bac, Glu
  reaction4: => Ind; medium*(cGlu^2*kdim_typeIDwt - Ind*kdegi_typeIDwt);  // modifiers: cGlu

  // Unit definitions:
  unit time = 60 second;
end
