// SBML level 2 version 4

model TwoStepSynthesisWithGlu()

  // Compartments:
  compartment medium = 1;

  // Species:
  species Bac in medium = init_Bac;
  species Glu in medium = 10;
  species cGlu in medium = 0;
  species Ind in medium = 0;

  // Parameters:
  Bacmax_typeIDT1_ExpID2 = 0.6877644;
  beta_typeIDT1_ExpID2 = 0.003651358;
  init_Bac = 0.01470079;
  kdegi_typeIDT1 = 0.003132231;
  kdim_typeIDT1 = 5.88467e-5;
  ksyn_typeIDT1 = 0.008185525;
  sd_Bacnorm = 0.03705789;
  sd_IndconcNormRange = 0.0203937;
  tau_typeIDT1_ExpID2 = 0.0006909333;

  // Assignment rules:
  lag := piecewise(0, time - tau_typeIDT1_ExpID2 < 0, 1);
  Bacnorm := Bac;
  IndconcNormRange := Ind;

  // Reactions:
  reaction1: => Bac; medium*(-(Bac*beta_typeIDT1_ExpID2*lag*(Bac - Bacmax_typeIDT1_ExpID2))/Bacmax_typeIDT1_ExpID2);
  reaction2: => Glu; medium*(-Bac)*Glu*ksyn_typeIDT1;  // modifiers: Bac
  reaction3: => cGlu; medium*(Bac*Glu*ksyn_typeIDT1 - cGlu^2*kdim_typeIDT1);  // modifiers: Bac, Glu
  reaction4: => Ind; medium*(cGlu^2*kdim_typeIDT1 - Ind*kdegi_typeIDT1);  // modifiers: cGlu

  // Unit definitions:
  unit time = 60 second;
end
