// SBML level 2 version 4

model model_template()

  // Compartments:
  compartment cyt = 1;

  // Species:
  species bcar in cyt = 0; bcar is "beta-carotin";
  species bcry in cyt = 0;
  species b10 in cyt = 0; b10 is "beta-10";
  species bio in cyt = 0; bio is "beta-io";
  species ohb10 in cyt = 0; ohb10 is "OH-beta-10";
  species ohbio in cyt = 0; ohbio is "OH-beta-io";
  species zea in cyt = init_zea;

  // Parameters:
  init_zea = 2.970267;
  k5 = 0.003050071;
  kc4 = 0.006179669;
  szea = 0.5218171;

  // Assignment rules:
  obcar := bcar;
  obcry := bcry;
  obio := bio;
  ob10 := b10;
  oohb10 := ohb10;
  ozea := zea;

  // Reactions:
  v5_ReactionName: ohb10 => ohbio; cyt*kc4*ohb10*szea;
  v6_ReactionName: zea => ohb10 + ohbio; cyt*k5*szea*zea;

  // Unit definitions:
  unit time = 60 second;
end
