// SBML level 2 version 4

model model_Reelin_FINAL()

  // Compartments:
  compartment DefaultCompartment = 1;

  // Species:
  species ApoER2_Dab1 in DefaultCompartment = init_ApoER2_Dab1;
  species ApoER2_Dab1SFK in DefaultCompartment = init_ApoER2_Dab1SFK;
  species ApoER2_Dab1SFKInh in DefaultCompartment = 0;
  species pApoER2_re_Dab1 in DefaultCompartment = 0;
  species ApoER2_re_Dab1 in DefaultCompartment = 0;
  species ApoER2_re_Dab1SFK in DefaultCompartment = 0;
  species ApoER2_re_Dab1SFKInh in DefaultCompartment = 0;
  species ApoER2_Dab1_released in DefaultCompartment = ApoER2_Dab1_SFK_release*init_ApoER2_Dab1SFK/(ApoER2_Dab1_SFK_degrad + ApoER2_Dab1_SFK_recycle);
  species SFK in DefaultCompartment = ApoER2_Dab1_SFK_release*init_ApoER2_Dab1SFK/(ApoER2_Dab1_bind_SFK*init_ApoER2_Dab1);

  // Parameters:
  ApoER2_Dab1_SFK_degrad = 0.01264744;
  ApoER2_Dab1_SFK_recycle = 2.656738;
  ApoER2_Dab1_SFK_release = 2019.253;
  ApoER2_Dab1_act = 10000;
  ApoER2_Dab1_bind_SFK = 124.0376;
  ApoER2_Dab1_bind_SFK_Reelin = 215831.2;
  Dab1_bind_Reelin = 0.014812;
  Dab1_release = 0.0521739;
  SFK_inhibition_ratio = 0.4546987;
  init_ApoER2_Dab1 = 1;
  init_ApoER2_Dab1SFK = 9.311896e-5;
  offset_Dab1_ExpReelin_Inh = 1e-8;
  offset_pAkt_ExpReelin_Inh = 0.4038224;
  offset_pDab1_ExpReelin_Inh = 0.0007090906;
  offset_pSFK_ExpReelin_Inh = 1.148711;
  offset_tApo_ExpReelin_Inh = 1e-8;
  offset_tSFK_ExpReelin_Inh = 0.08359443;
  perc_mes = 0.05341681;
  scale_Dab1_ExpReelin_Inh = 2.315113;
  scale_pAkt_ExpReelin_Inh = 102744.6;
  scale_pDab1_ExpReelin_Inh = 2541.691;
  scale_pSFK_ExpReelin_Inh = 27531.22;
  scale_tApo__ExpReelin_Inh = 10;
  scale_tSFK_ExpReelin_Inh = 10;
  sd_Dab1 = 0.1;
  sd_pAkt = 0.1;
  sd_pDab1 = 0.1;
  sd_pSFK = 0.1;
  sd_tApoER2 = 0.1;
  sd_tSFK = 0.1;

  // Assignment rules:
  Reelin_step := piecewise(0, time < 0, 1)*exp(-10e-5*time);
  Dab1 := log10(offset_Dab1_ExpReelin_Inh + scale_Dab1_ExpReelin_Inh*(ApoER2_Dab1 + ApoER2_Dab1SFK + ApoER2_re_Dab1 + ApoER2_Dab1SFKInh + ApoER2_re_Dab1SFK + ApoER2_re_Dab1SFKInh + ApoER2_Dab1_released + pApoER2_re_Dab1));
  pDab1 := log10(offset_pDab1_ExpReelin_Inh + scale_pDab1_ExpReelin_Inh*(ApoER2_Dab1SFK + ApoER2_re_Dab1SFK + pApoER2_re_Dab1));
  pAkt := log10(offset_pAkt_ExpReelin_Inh + scale_pAkt_ExpReelin_Inh*(ApoER2_Dab1SFK + ApoER2_re_Dab1SFK + pApoER2_re_Dab1));
  pSFK := log10(offset_pSFK_ExpReelin_Inh + scale_pSFK_ExpReelin_Inh*(ApoER2_Dab1SFK + ApoER2_re_Dab1SFK + ApoER2_re_Dab1SFKInh*perc_mes));
  tSFK := log10(offset_tSFK_ExpReelin_Inh + scale_tSFK_ExpReelin_Inh*(ApoER2_Dab1SFK + ApoER2_Dab1SFKInh + ApoER2_re_Dab1SFK + ApoER2_re_Dab1SFKInh + SFK));
  tApoER2 := log10(offset_tApo_ExpReelin_Inh + scale_tApo__ExpReelin_Inh*(ApoER2_Dab1 + ApoER2_Dab1SFK + ApoER2_re_Dab1 + ApoER2_Dab1SFKInh + ApoER2_re_Dab1SFK + ApoER2_re_Dab1SFKInh + ApoER2_Dab1_released + pApoER2_re_Dab1));

  // Reactions:
  v1_v_ApoER2_Dab1_prod: => ApoER2_Dab1; ApoER2_Dab1_SFK_degrad*ApoER2_Dab1_SFK_release*init_ApoER2_Dab1SFK/(ApoER2_Dab1_SFK_degrad + ApoER2_Dab1_SFK_recycle);
  v2_v_ApoER2_Dab1_bind_SFK: ApoER2_Dab1 + SFK => ApoER2_Dab1SFK; ApoER2_Dab1*ApoER2_Dab1_bind_SFK*SFK*SFK_inhibition_ratio;
  v3_v_ApoER2_Dab1_SFKInh_bind: ApoER2_Dab1 + SFK => ApoER2_Dab1SFKInh; -ApoER2_Dab1*ApoER2_Dab1_bind_SFK*SFK*(SFK_inhibition_ratio - 1);
  v4_v_ApoER2_Dab1_SFK_release: ApoER2_Dab1SFK => ApoER2_Dab1_released + SFK; ApoER2_Dab1SFK*ApoER2_Dab1_SFK_release;
  v5_v_ApoER2_Dab1_SFKInh_unbind: ApoER2_Dab1SFKInh => ApoER2_Dab1 + SFK; ApoER2_Dab1SFKInh*SFK_inhibition_ratio/ApoER2_Dab1_act;
  v6_v_ApoER2_Dab1SFK_bind_Reelin: ApoER2_Dab1SFK => ApoER2_re_Dab1SFK; ApoER2_Dab1SFK*Dab1_bind_Reelin*Reelin_step;
  v7_v_ApoER2_Dab1SFKInh_bind_Reelin: ApoER2_Dab1SFKInh => ApoER2_re_Dab1SFKInh; ApoER2_Dab1SFKInh*Dab1_bind_Reelin*Reelin_step;
  v8_v_ApoER2_re_Dab1_activation: ApoER2_re_Dab1 => pApoER2_re_Dab1; ApoER2_re_Dab1*ApoER2_Dab1_act*ApoER2_re_Dab1SFK/SFK_inhibition_ratio;  // modifiers: ApoER2_re_Dab1SFK
  v9_v_ApoER2_Dab1_bind_Reelin: ApoER2_Dab1 => ApoER2_re_Dab1; ApoER2_Dab1*Dab1_bind_Reelin*Reelin_step;
  v10_v_ApoER2_Dab1_bind_SFK_Reelin: ApoER2_Dab1 + SFK => ApoER2_re_Dab1SFK; ApoER2_Dab1*ApoER2_Dab1_bind_SFK_Reelin*Reelin_step*SFK*SFK_inhibition_ratio;
  v11_v_ApoER2_Dab1_bind_SFKInh_Reelin: ApoER2_Dab1 + SFK => ApoER2_re_Dab1SFKInh; -ApoER2_Dab1*ApoER2_Dab1_bind_SFK_Reelin*Reelin_step*SFK*(SFK_inhibition_ratio - 1);
  v12_v_ApoER2_re_Dab1SFKInh_unbind: ApoER2_re_Dab1SFKInh => ApoER2_Dab1 + SFK; ApoER2_re_Dab1SFKInh*SFK_inhibition_ratio/ApoER2_Dab1_act;
  v13_v_pApoER2_re_Dab1_release: pApoER2_re_Dab1 => ApoER2_Dab1_released; Dab1_release*pApoER2_re_Dab1;
  v14_v_ApoER2_re_Dab1SFK_release: ApoER2_re_Dab1SFK => ApoER2_Dab1_released + SFK; ApoER2_re_Dab1SFK*ApoER2_Dab1_SFK_release;
  v15_v_Dab1_released_degrad: ApoER2_Dab1_released => ; ApoER2_Dab1_released*ApoER2_Dab1_SFK_degrad;
  v16_v_Dab1_released_recycle: ApoER2_Dab1_released => ApoER2_Dab1; ApoER2_Dab1_released*ApoER2_Dab1_SFK_recycle;

  // Unit definitions:
  unit time = 60 second;
end
