// SBML level 2 version 4

model model_Sneyd_PNAS2002()

  // Compartments:
  compartment membrane = 1;

  // Species:
  species IPR_O in membrane = 0;
  species IPR_R in membrane = 1;
  species IPR_I1 in membrane = 0; IPR_I1 is "I_1";
  species IPR_S in membrane = 0;
  species IPR_A in membrane = 0;
  species IPR_I2 in membrane = 0; IPR_I2 is "I_2";

  // Parameters:
  k1 = 3.727211;
  k2 = 100000;
  k3 = 15.74534;
  k4 = 99938.26;
  k_1 = 0.9239247;
  k_2 = 0.001002495;
  k_3 = 1.91463;
  k_4 = 3079.207;
  l2 = 0.940077;
  l4 = 2.858377;
  l6 = 100000;
  l_2 = 0.3476645;
  l_4 = 0.0138802;
  l_6 = 0.001;
  sigma = 0.02266568;

  // Assignment rules:
  open_probability := (0.9*IPR_A + 0.1*IPR_O)^4;

  // Reactions:
  v1_v_0: IPR_O => IPR_R; membrane*(IPR_O*(k_2 + 0.2*l_4)/(0.2*k4*l_6/(k_4*l6) + 1));
  v2_v_1: IPR_R => IPR_O; membrane*(10*IPR_R*(0.2*l4 + k_2*l4/l_4)/(k_2*l4/(k2*l_4) + 0.2*k1*k_2*l4*l_2/(k2*k_1*l2*l_4) + 0.2));
  v3_v_2: IPR_R => IPR_I1; membrane*(0.2*IPR_R*(l2 + k_1*l2/l_2)/(k_1*l2/(k1*l_2) + 0.2*k2*k_1*l2*l_4/(k1*k_2*l4*l_2) + 0.2));
  v4_v_3: IPR_I1 => IPR_R; membrane*IPR_I1*(k_1 + l_2);
  v5_v_4: IPR_O => IPR_A; membrane*(0.2*IPR_O*(l6 + k_4*l6/l_6)/(k_4*l6/(k4*l_6) + 0.2));
  v6_v_5: IPR_A => IPR_O; membrane*(IPR_A*k_1*l2*(k_4 + l_6)/(k1*l_2*(k_1*l2/(k1*l_2) + 0.2)));
  v7_v_6: IPR_A => IPR_I2; membrane*(0.2*IPR_A*(l2 + k_1*l2/l_2)/(k_1*l2/(k1*l_2) + 0.2));
  v8_v_7: IPR_I2 => IPR_A; membrane*IPR_I2*(k_1 + l_2);
  v9_v_8: IPR_O => IPR_S; membrane*(IPR_O*k3*k_4*l6/(k4*l_6*(k_4*l6/(k4*l_6) + 0.2)));
  v10_v_9: IPR_S => IPR_O; membrane*IPR_S*k_3;

  // Unit definitions:
  unit time = second;
end
